<?xml version='1.0' encoding='utf-8'?>
<aerodynamics>
    <axis name="X">
      <function name="aero/x/alpha">
          <product>
              <property>aero/qbar-psf</property>
              <property>metrics/Sw-sqft</property>
              <table>
                  <independentVar lookup="row">aero/alpha-rad</independentVar>
                  <tableData>-3.141593 0.039292
-3.106686 0.045923
-3.071779 0.040870
-2.792527 -0.313844
-2.513274 -0.078530
-2.234021 0.220213
-1.954769 0.231506
-1.675516 0.091552
-1.396263 -0.122450
-1.117011 -0.196288
-0.837758 -0.127072
-0.558505 0.463002
-0.279253 0.152675
0.000000 -0.039292
0.279253 0.233276
0.558505 0.254363
0.837758 -0.194442
1.117011 -0.242653
1.396263 -0.140897
1.675516 0.080315
1.954769 0.191886
2.234021 0.156606
2.513274 -0.417648
2.792527 -0.295315
3.071779 0.003871
3.106686 0.021034
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3.141593 0.039292</tableData>
              </table>
          </product>
      </function>
      <function name="aero/x/q">
          <product>
              <property>aero/qbar-psf</property>
              <property>metrics/Sw-sqft</property>
              <property>velocities/q-aero-rad_sec</property>
              <property>aero/ci2vel</property>
              <value> -0.0654347793 </value>
          </product>
      </function>
    </axis>
    <axis name="Y">
      <function name="aero/y/alpha">
          <product>
              <property>aero/qbar-psf</property>
              <property>metrics/Sw-sqft</property>
              <table>
                  <independentVar lookup="row">aero/alpha-rad</independentVar>
                  <tableData>-3.141593 -0.000000
-3.106686 -0.000000
-3.071779 -0.000000
-2.792527 -0.000000
-2.513274 -0.000000
-2.234021 -0.000000
-1.954769 -0.000000
-1.675516 -0.000000
-1.396263 -0.000000
-1.117011 -0.000000
-0.837758 -0.000000
-0.558505 -0.000000
-0.279253 -0.000000
0.000000 -0.000000
0.279253 -0.000000
0.558505 -0.000000
0.837758 -0.000000
1.117011 -0.000000
1.396263 -0.000000
1.675516 -0.000000
1.954769 -0.000000
2.234021 -0.000000
2.513274 -0.000000
2.792527 -0.000000
3.071779 -0.000000
3.106686 -0.000000
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3.141593 -0.000000</tableData>
              </table>
          </product>
      </function>
      <function name="aero/y/beta">
          <product>
              <property>aero/qbar-psf</property>
              <property>metrics/Sw-sqft</property>
              <property>aero/beta-rad</property>
              <value>-0.120961</value>
          </product>
      </function>
    </axis>
    <axis name="Z">
      <function name="aero/z/alpha">
          <product>
              <property>aero/qbar-psf</property>
              <property>metrics/Sw-sqft</property>
              <table>
                  <independentVar lookup="row">aero/alpha-rad</independentVar>
                  <tableData>-3.141593 0.272193
-3.106686 0.439974
-3.071779 0.608336
-2.792527 1.308569
-2.513274 0.286647
-2.234021 0.284971
-1.954769 0.572998
-1.675516 0.871062
-1.396263 0.694450
-1.117011 0.402450
-0.837758 0.141127
-0.558505 0.875534
-0.279253 1.041362
0.000000 -0.272193
0.279253 -1.596990
0.558505 -0.485881
0.837758 -0.222789
1.117011 -0.497513
1.396263 -0.799068
1.675516 -0.764143
1.954769 -0.474934
2.234021 -0.200447
2.513274 -0.588667
2.792527 -1.349337
3.071779 -0.060033
3.106686 0.105613
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3.141593 0.272193</tableData>
              </table>
          </product>
      </function>
      <function name="aero/z/q">
          <product>
              <property>aero/qbar-psf</property>
              <property>metrics/Sw-sqft</property>
              <property>velocities/q-aero-rad_sec</property>
              <property>aero/ci2vel</property>
              <value> -0.989851071 </value>
          </product>
      </function>
      <function name="aero/z/servo_0">
          <product>
              <property>aero/qbar-psf</property>
              <property>metrics/Sw-sqft</property>
              <property>fcs/servo-0-pos-deg</property>
              <value>0.00864024382</value>
          </product>
      </function>
      <function name="aero/z/servo_1">
          <product>
              <property>aero/qbar-psf</property>
              <property>metrics/Sw-sqft</property>
              <property>fcs/servo-1-pos-deg</property>
              <value>0.00864024382</value>
          </product>
      </function>
      <function name="aero/z/servo_2">
          <product>
              <property>aero/qbar-psf</property>
              <property>metrics/Sw-sqft</property>
              <property>fcs/servo-2-pos-deg</property>
              <value>0.00207366024</value>
          </product>
      </function>
    </axis>
    <axis name="ROLL">
      <function name="aero/roll/alpha">
          <product>
              <property>aero/qbar-psf</property>
              <property>metrics/Sw-sqft</property>
              <property>metrics/bw-ft</property>
              <table>
                  <independentVar lookup="row">aero/alpha-rad</independentVar>
                  <tableData>
-3.141593 0
-3.106686 0
-2.827433 0
-2.548181 0
-2.268928 0
-1.989675 0
-1.710423 0
-1.431170 0
-1.151917 0
-0.872665 0
-0.593412 0
-0.314159 0
-0.034907 0
0.244346 0
0.523599 0
0.802851 0
1.082104 0
1.361357 0
1.640609 0
1.919862 0
2.199115 0
2.478368 0
2.757620 0
3.036873 0
3.141593 0
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</tableData>
              </table>
          </product>
      </function>
      <function name="aero/roll/p">
          <product>
              <property>aero/qbar-psf</property>
              <property>metrics/Sw-sqft</property>
              <property>metrics/bw-ft</property>
              <property>velocities/p-aero-rad_sec</property>
              <property>aero/bi2vel</property>
              <value> -0.185787484 </value>
          </product>
      </function>
      <function name="aero/roll/r">
          <product>
              <property>aero/qbar-psf</property>
              <property>metrics/Sw-sqft</property>
              <property>metrics/bw-ft</property>
              <property>velocities/r-aero-rad_sec</property>
              <property>aero/bi2vel</property>
              <value> 0.0220542592 </value>
          </product>
      </function>
      <function name="aero/roll/servo_0">
          <product>
              <property>aero/qbar-psf</property>
              <property>metrics/Sw-sqft</property>
              <property>metrics/bw-ft</property>
              <property>fcs/servo-0-pos-deg</property>
              <value> -0.00120898904 </value>
          </product>
      </function>
      <function name="aero/roll/servo_1">
          <product>
              <property>aero/qbar-psf</property>
              <property>metrics/Sw-sqft</property>
              <property>metrics/bw-ft</property>
              <property>fcs/servo-1-pos-deg</property>
              <value> 0.00120898904 </value>
          </product>
      </function>
    </axis>
    <axis name="PITCH">
      <function name="aero/pitch/alpha">
          <product>
              <property>aero/qbar-psf</property>
              <property>metrics/Sw-sqft</property>
              <property>metrics/cbarw-ft</property>
              <table>
                  <independentVar lookup="row">aero/alpha-rad</independentVar>
                  <tableData>
-3.141593 0.0158648955
-3.106686 0.0345817562
-2.827433 0.188818448
-2.548181 0.0698798616
-2.268928 0.00721945649
-1.989675 0.0346668227
-1.710423 0.081972731
-1.431170 0.0962862829
-1.151917 0.0731571591
-0.872665 0.0362360751
-0.593412 0.0312261081
-0.314159 0.112719781
-0.034907 0.00150881044
0.244346 -0.171451458
0.523599 -0.111152767
0.802851 -0.0052405419
1.082104 -0.0253878623
1.361357 -0.0688254852
1.640609 -0.0981040189
1.919862 -0.0807370287
2.199115 -0.0461776584
2.478368 -0.0163797715
2.757620 -0.124465668
3.036873 -0.0386246518
3.141593 0.0158648955
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</tableData>
              </table>
          </product>
      </function>
      <function name="aero/pitch/q">
          <product>
              <property>aero/qbar-psf</property>
              <property>metrics/Sw-sqft</property>
              <property>metrics/cbarw-ft</property>
              <property>velocities/q-aero-rad_sec</property>
              <property>aero/ci2vel</property>
              <value> -0.196841487 </value>
          </product>
      </function>
      <function name="aero/pitch/servo_0">
          <product>
              <property>aero/qbar-psf</property>
              <property>metrics/Sw-sqft</property>
              <property>metrics/cbarw-ft</property>
              <property>fcs/servo-0-pos-deg</property>
              <value> 0.000917061751 </value>
          </product>
      </function>
      <function name="aero/pitch/servo_1">
          <product>
              <property>aero/qbar-psf</property>
              <property>metrics/Sw-sqft</property>
              <property>metrics/cbarw-ft</property>
              <property>fcs/servo-1-pos-deg</property>
              <value> 0.000917061751 </value>
          </product>
      </function>
      <function name="aero/pitch/servo_2">
          <product>
              <property>aero/qbar-psf</property>
              <property>metrics/Sw-sqft</property>
              <property>metrics/cbarw-ft</property>
              <property>fcs/servo-2-pos-deg</property>
              <value> 0.00220094781 </value>
          </product>
      </function>
    </axis>
    <axis name="YAW">
      <function name="aero/yaw/alpha">
          <product>
              <property>aero/qbar-psf</property>
              <property>metrics/Sw-sqft</property>
              <property>metrics/bw-ft</property>
              <table>
                  <independentVar lookup="row">aero/alpha-rad</independentVar>
                  <tableData>
-3.141593 -0
-3.106686 -0
-2.827433 -0
-2.548181 -0
-2.268928 -0
-1.989675 -0
-1.710423 -0
-1.431170 -0
-1.151917 -0
-0.872665 -0
-0.593412 -0
-0.314159 -0
-0.034907 -0
0.244346 -0
0.523599 -0
0.802851 -0
1.082104 -0
1.361357 -0
1.640609 -0
1.919862 -0
2.199115 -0
2.478368 -0
2.757620 -0
3.036873 -0
3.141593 -0
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</tableData>
              </table>
          </product>
      </function>
      <function name="aero/yaw/p">
          <product>
              <property>aero/qbar-psf</property>
              <property>metrics/Sw-sqft</property>
              <property>metrics/bw-ft</property>
              <property>velocities/p-aero-rad_sec</property>
              <property>aero/bi2vel</property>
              <value> 0.0138512119 </value>
          </product>
      </function>
      <function name="aero/yaw/r">
          <product>
              <property>aero/qbar-psf</property>
              <property>metrics/Sw-sqft</property>
              <property>metrics/bw-ft</property>
              <property>velocities/r-aero-rad_sec</property>
              <property>aero/bi2vel</property>
              <value> -0.00752627002 </value>
          </product>
      </function>
      <function name="aero/yaw/beta">
          <product>
              <property>aero/qbar-psf</property>
              <property>metrics/Sw-sqft</property>
              <property>metrics/bw-ft</property>
              <property>aero/beta-rad</property>
              <value> 0.0165871796 </value>
          </product>
      </function>
    </axis>
  </aerodynamics>
