<?xml version="1.0"?>
<!--
  Derived from the model: the diameter is this propeller's own mesh measured after scaling, and the
  coefficients reproduce its motorConstant and momentConstant exactly at zero airspeed.

  The tables are flat because the source has no advance ratio in it: Gazebo's motor model computes
  thrust from rotational speed alone. A curve here would be invented, and this vehicle would then
  fly on numbers nobody measured.
-->
<propeller name="standard_vtol_prop_1" version="1.1">
  <diameter unit="IN"> 10.16 </diameter>
  <numblades> 2 </numblades>
  <constspeed> 0 </constspeed>
  <ixx unit="KG*M2"> 0.0001997 </ixx>
  <table name="C_THRUST" type="internal">
    <tableData>
      0.0  0.0621783
      1.0  0.0621783
    </tableData>
  </table>
  <table name="C_POWER" type="internal">
    <tableData>
      0.0  0.0151425
      1.0  0.0151425
    </tableData>
  </table>
</propeller>
