<?xml version="1.0"?>
<fdm_config name="tiltrotor" version="2.0" release="ALPHA">
  <metrics file="Metrics.xml"/>
  <mass_balance file="Mass.xml"/>
  <ground_reactions file="Gear.xml"/>
  <propulsion file="Propulsion.xml"/>
  <flight_control file="FlightControl.xml"/>
  <aerodynamics file="Aero.xml"/>
</fdm_config>
